*Heading
** Job name: CementCnt Model name: Model-1
** Generated by: Abaqus/CAE 2021
*Preprint, echo=NO, model=NO, history=NO, contact=NO
**
** PARTS
**
*Part, name=Part-1
*End Part
**
**
** ASSEMBLY
**
*Assembly, name=Assembly
**
*Instance, name=Part-1-1, part=Part-1
*Node
      1,         -20.,         -20.,          80.
      2,         -20.,         -20.,          30.
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*Element, type=C3D8R
  1,  110,  516, 1302,  418,    1,   26,  301,   49
  2,  516,  517, 1303, 1302,   26,   27,  302,  301
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*Nset, nset=Set-1, generate
    1,  2673,     1
*Elset, elset=Set-1, generate
    1,  2048,     1
** Section: Section-1
*Solid Section, elset=Set-1, material=Material-1
,
*End Instance
**
*Nset, nset=Constraints, instance=Part-1-1
   2,   3,   5,  11,  12,  13
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*Nset, nset=Loads, instance=Part-1-1
  90,  91,  92,  93,  94,  95
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*Nset, nset=Monitor, instance=Part-1-1
 4,
*End Assembly
**
** MATERIALS
**
*Material, name=Material-1
*Elastic
1., 0.2
** ----------------------------------------------------------------
**
** STEP: Step-1
**
*Step, name=Step-1, nlgeom=NO
*Static
1., 1., 1e-05, 1.
**
** BOUNDARY CONDITIONS
**
** Name: Constraints Type: Displacement/Rotation
*Boundary
Constraints, 1, 1
Constraints, 2, 2
Constraints, 3, 3
**
** LOADS
**
** Name: Loads   Type: Concentrated force
*Cload
Loads, 2, -1.
**
** OUTPUT REQUESTS
**
*Restart, write, frequency=0
**
** FIELD OUTPUT: F-Output-1
**
*Output, field, variable=PRESELECT
**
** HISTORY OUTPUT: H-Output-1
**
*Output, history, variable=PRESELECT
*End Step
