*Heading
** Job name: ReinfConcrBeam Model name: Model-1
** Generated by: Abaqus/CAE 2021
*Preprint, echo=NO, model=NO, history=NO, contact=NO
**
** PARTS
**
*Part, name=Beam
*End Part
**
*Part, name=Rebar
*End Part
**
**
** ASSEMBLY
**
*Assembly, name=Assembly
**
*Instance, name=Beam-1, part=Beam
*Node
      1,         -75.,         125.,          50.
      2,         -75.,        -125.,          50.
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*Element, type=C3D8R
  1,  130,  703, 1495,  589,    1,   25,  361,   74
  2,  703,  704, 1496, 1495,   25,   26,  362,  361
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*Nset, nset=Set-1, generate
    1,  2520,     1
*Elset, elset=Set-1, generate
    1,  1736,     1
** Section: Section-1
*Solid Section, elset=Set-1, material=Material-1
,
*End Instance
**
*Instance, name=Rebar-1, part=Rebar
*Node
      1,          55.,         105.,        2075.
      2,         -55.,         105.,        2075.
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*Element, type=B31
1,   1, 177
2, 177,   2
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*Nset, nset=Wire-2-Set-2, generate
   1,  176,    1
*Elset, elset=Wire-2-Set-2
   7,  10,  15,  22,  25,  30
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*Nset, nset=Wire-1-Set-1
   1,   2,   3,   4,   5,   6
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*Elset, elset=Wire-1-Set-1
   1,   2,   3,   4,   5,   6
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*Nset, nset=Set-3, generate
   1,  512,    1
*Elset, elset=Set-3, generate
   1,  676,    1
** Section: Section-3
*Solid Section, elset=Set-3, material=Material-1
1.,
*End Instance
**
*Nset, nset=Constraints, instance=Beam-1
   2,   5,  17,  19, 134, 135, 136, 340, 341, 342
*Nset, nset=Loads, instance=Beam-1
 126, 226
*Nset, nset=Monitor, instance=Beam-1
 1052,
*End Assembly
**
** MATERIALS
**
*Material, name=Material-1
*Elastic
1., 0.2
** ----------------------------------------------------------------
**
** STEP: Step-1
**
*Step, name=Step-1, nlgeom=NO
*Static
1., 1., 1e-05, 1.
**
** BOUNDARY CONDITIONS
**
** Name: Constaint Type: Displacement/Rotation
*Boundary
Constraints, 1, 1
Constraints, 2, 2
Constraints, 3, 3
**
** LOADS
**
** Name: Load   Type: Concentrated force
*Cload
Loads, 2, -1.
**
** OUTPUT REQUESTS
**
*Restart, write, frequency=0
**
** FIELD OUTPUT: F-Output-1
**
*Output, field, variable=PRESELECT
**
** HISTORY OUTPUT: H-Output-1
**
*Output, history, variable=PRESELECT
*End Step
